// COMSOL Multiphysics 6.3.0.420 model "electrostatic-2D.mph"
// Outline of the model tree

Selections
  sel1: Explicit "air" on domains 1, 3, 5
  sel2: Explicit "metal" on domains 2, 6
  sel3: Explicit "glass" on domains 4

Geometry
  geom1 "Geometry 1" (2D, length unit cm)
    r1: Rectangle | size = {60, 40}; base = center
    r2: Rectangle | size = {20, 2}; base = center; pos = {0, +5}
    r3: Rectangle | size = {20, 2}; base = center; pos = {0, -5}
    r4: Rectangle | size = {20, 8}; base = center
    r5: Rectangle | size = {20, 2}; base = center
    fin: Finalize "Form Union"

Materials
  mat1: Common "Air" on selection sel1
    def: def "Basic"
      thermalexpansioncoefficient = alpha_p(pA,T)
      molarmass = 0.02897[kg/mol]
      bulkviscosity = muB(T)
      relpermeability = 1
      relpermittivity = 1
      dynamicviscosity = eta(T)
      ratioofspecificheat = 1.4
      electricconductivity = 0[S/m]
      heatcapacity = Cp(T)
      density = rho(pA,T)
      thermalconductivity = k(T)
      soundspeed = cs(T)
      eta: Piecewise | arg = T; pieces = {200.0, 1600.0, -8.38278E-7+8.35717342E-8*T^1-7.69429583E-11*T^2+4.6437266E-14*T^3-1.06585607E-17*T^4}; argunit = K; fununit = Pa*s
      Cp: Piecewise | arg = T; pieces = {200.0, 1600.0, 1047.63657-0.372589265*T^1+9.45304214E-4*T^2-6.02409443E-7*T^3+1.2858961E-10*T^4}; argunit = K; fununit = J/(kg*K)
      rho: Analytic | expr = pA*0.02897/R_const[K*mol/J]/T; args = {pA, T}; fununit = kg/m^3; argunit = {Pa, K}
      k: Piecewise | arg = T; pieces = {200.0, 1600.0, -0.00227583562+1.15480022E-4*T^1-7.90252856E-8*T^2+4.11702505E-11*T^3-7.43864331E-15*T^4}; argunit = K; fununit = W/(m*K)
      cs: Analytic | expr = sqrt(1.4*R_const[K*mol/J]/0.02897*T); args = T; fununit = m/s; argunit = K
      an1: Analytic | funcname = alpha_p; expr = -1/rho(pA,T)*d(rho(pA,T),T); args = {pA, T}; fununit = 1/K; argunit = {Pa, K}
      an2: Analytic "Analytic 2a" | funcname = muB; expr = 0.6*eta(T); args = T; fununit = Pa*s; argunit = K
    RefractiveIndex: RefractiveIndex
      n = 1
      ki = 0
    NonlinearModel: NonlinearModel
      BA = def.gamma-1
    idealGas: idealGas
      Rs = R_const/Mn
      heatcapacity = Cp(T)
      ratioofspecificheat = 1.4
      molarmass = 0.02897[kg/mol]
      Cp: Piecewise | arg = T; pieces = {200.0, 1600.0, 1047.63657-0.372589265*T^1+9.45304214E-4*T^2-6.02409443E-7*T^3+1.2858961E-10*T^4}; argunit = K; fununit = J/(kg*K)
  mat2: Common "Glass (quartz)" on selection sel3
    def: def "Basic"
      relpermeability = 1
      electricconductivity = 1e-14[S/m]
      relpermittivity = 4.2
      density = 2210[kg/m^3]
      thermalconductivity = 1.4[W/(m*K)]
      heatcapacity = 730[J/(kg*K)]
    RefractiveIndex: RefractiveIndex
      n = 1.5
      ki = 0
  mat3: Common "Aluminum" on selection sel2
    def: def "Basic"
      relpermeability = 1
      heatcapacity = 900[J/(kg*K)]
      thermalconductivity = 238[W/(m*K)]
      electricconductivity = 3.774e7[S/m]
      relpermittivity = 1
      thermalexpansioncoefficient = 23e-6[1/K]
      density = 2700[kg/m^3]
    Enu: Enu "Young's modulus and Poisson's ratio"
      E = 70[GPa]
      nu = 0.33
    Murnaghan: Murnaghan
      l = -250[GPa]
      m = -330[GPa]
      n = -350[GPa]

Physics
  es: Electrostatics on all domains
    dependent variable V
    fsp1: FreeSpace (default)
    zc1: ZeroCharge (default)
    init1: init "Initial Values 1" (default)
    gnd1: Ground on boundaries 4, 5, 7, 15
    term1: DomainTerminal "Terminal 1" on domains 6 | TerminalType = Voltage
    scd1: SpaceChargeDensity on selection sel3 | rhoq = -30[uC/m^4]*y

Mesh
  mesh1 "Mesh 1"
    size: MeshSizeDefault | hauto = 1
    ftri1: FreeTri "Free Triangular 1" on remaining entities | smoothmaxiter = 4; smoothmaxdepth = 4

Studies
  std1 "Study 1"
    stat: Stationary

Solver configurations
  sol1 "Solution 1" (study std1)
    v1: Variables "Dependent Variables 1"
    s1: Stationary "Stationary Solver 1"
      dDef: Direct
      fc1: FullyCoupled

Datasets
  dset1: Solution | solution = sol1
  cln1: CutLine2D | data = dset1; genpoints = {{0.00972748, -4.04232}, {0.004863, 3.98878}}

Plots
  pg1: PlotGroup2D "Electric Potential (es)" | data = dset1
    surf1: Surface | expr = V
    str1: Streamline on boundaries 1-8, 10, 12-20 | expr = {es.Ex, es.Ey}; udist = 0.02; maxsteps = 5000
      col1: Color "Color Expression 1" | expr = V
      filt1: Filter | expr = !isScalingSystemDomain
    arws1: ArrowSurface | expr = {es.Ex, es.Ey}; xnumber = 30
  pg2: PlotGroup2D "Electric Field (es)" | data = dset1
    surf1: Surface | expr = es.normE
    str1: Streamline on boundaries 1-8, 10, 12-20 | expr = {es.Ex, es.Ey}; udist = 0.02; maxsteps = 5000
      col1: Color "Color Expression 1" | expr = es.normE
      filt1: Filter | expr = !isScalingSystemDomain
  pg3: PlotGroup1D "1D Plot Group 3" | data = dset1
    lngr1: LineGraph | data = cln1; expr = V